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/batch
! ANSYS input file written by Workbench version 2025 R1
! File used for geometry attach: C:\Users\Leona\Documents\Mestrado\ANSYS\Modelos flambagem perfis pultrudados_att_files\dp0\SYS-8\DM\SYS-8.scdocx
/title,Modelos flambagem perfis pultrudados_att--Static Structural (F5)
/COM,/COM,     ANSYSMotion, 2025.1
/com,--- Data in consistent NMM units. See Solving Units in the help system for more information.
/units,MPA
/prep7
! Turn off shape checking because checks already performed inside WB mesher.
! See help system for more information.
SHPP,OFF,,NOWARN
etcon,set             ! allow ANSYS to choose best KEYOP's for 180x elements, resets any applicable keyopt to MAPDL defaults
/com,*********** Nodes for the whole assembly ***********
nblock,3,,7342
(1i9,3e20.9e3)
        1    -5.000000000E+01     9.050000000E+01     2.000000000E+03
        2     2.983724379E-13     9.050000000E+01     2.000000000E+03
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-1
/com,*********** Nodes for all Remote Points ***********
nblock,3
(1i9,3e20.9e3)
     6678     2.976014526E-13     9.049999714E+01     2.000000000E+03
-1
/com,*********** Elements for Body 1 'Surface' ***********
et,1,181
keyo,1,1,0          ! bending and membrane stiffness
keyo,1,3,2
eblock,19,solid,,798
(19i9)
        1        1        1        1       13        0        0        0        4        0        1     6275     5880     6276        6
        1        1        1        1       13        0        0        0        4        0        2     6274     5882     5880     6275
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-1
/com,*********** Elements for Body 2 'Surface' ***********
et,2,181
keyo,2,1,0          ! bending and membrane stiffness
keyo,2,3,2
eblock,19,solid,,1596
(19i9)
        2        2        2        2       12        0        0        0        4        0      799     5869     4417     3089        8
        2        2        2        2       12        0        0        0        4        0      800     5870     4549     4417     5869
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-1
/com,*********** Elements for Body 3 'Surface' ***********
et,3,181
keyo,3,1,0          ! bending and membrane stiffness
keyo,3,3,2
eblock,19,solid,,798
(19i9)
        3        3        3        3       13        0        0        0        4        0     2395     3887     3621      418       13
        3        3        3        3       13        0        0        0        4        0     2396     3888     3623     3621     3887
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-1
/com,*********** Elements for Body 4 'Surface1' ***********
et,4,181
keyo,4,1,0          ! bending and membrane stiffness
keyo,4,3,2
eblock,19,solid,,798
(19i9)
        4        4        4        4       13        0        0        0        4        0     3193     3085     2689     3089        8
        4        4        4        4       13        0        0        0        4        0     3194     3086     2821     2689     3085
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-1
/com,*********** Elements for Body 5 'Surface1' ***********
et,5,181
keyo,5,1,0          ! bending and membrane stiffness
keyo,5,3,2
eblock,19,solid,,1596
(19i9)
        5        5        5        5       12        0        0        0        4        0     3991     2688      951     2556        7
        5        5        5        5       12        0        0        0        4        0     3992     2687      962      951     2688
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-1
/com,*********** Elements for Body 6 'Surface1' ***********
et,6,181
keyo,6,1,0          ! bending and membrane stiffness
keyo,6,3,2
eblock,19,solid,,798
(19i9)
        6        6        6        6       13        0        0        0        4        0     5587      283       19      416       18
        6        6        6        6       13        0        0        0        4        0     5588      284       21       19      283
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-1
/com,*********** Send User Defined Coordinate System(s) ***********
local,12,0,0.,0.,0.,0.,0.,-90.
local,13,0,0.,0.,0.,-90.,0.,-90.
csys,0
toffst,273.15,      ! Temperature offset from absolute zero
/com,*********** Set Reference Temperature ***********
tref,22.
/com,*********** Send Materials ***********
MODX1 = 49098.4126984127 !Modulo de elasticidade X
MODY1 = 15426.983447870069 !Modulo de elasticidade Y
POIXY1 = 0.27365079365079364 ! MAJOR Poisson's Ratio XY
GSXY1 = 4843.038154915568 ! Modulo cisalhante XY
GSYZ1 = 6056.206114256071 ! Modulo cisalhante YZ
MP,DENS,1,2e-6,	! tonne mm^-3
MP,EX,1,MODX1,	! tonne s^-2 mm^-1
MP,EY,1,MODY1,	! tonne s^-2 mm^-1
MP,EZ,1,MODY1,	! tonne s^-2 mm^-1
MP,PRXY,1,POIXY1,
MP,PRYZ,1,POIXY1,
MP,PRXZ,1,POIXY1,
MP,GXY,1,GSXY1,	! tonne s^-2 mm^-1
MP,GYZ,1,GSYZ1,	! tonne s^-2 mm^-1
MP,GXZ,1,GSXY1,	! tonne s^-2 mm^-1

MP,DENS,2,2e-6,	! tonne mm^-3
MP,EX,2,MODX1,	! tonne s^-2 mm^-1
MP,EY,2,MODY1,	! tonne s^-2 mm^-1
MP,EZ,2,MODY1,	! tonne s^-2 mm^-1
MP,PRXY,2,POIXY1,
MP,PRYZ,2,POIXY1,
MP,PRXZ,2,POIXY1,
MP,GXY,2,GSXY1,	! tonne s^-2 mm^-1
MP,GYZ,2,GSYZ1,	! tonne s^-2 mm^-1
MP,GXZ,2,GSXY1,	! tonne s^-2 mm^-1

MP,DENS,3,2e-6,	! tonne mm^-3
MP,EX,3,MODX1,	! tonne s^-2 mm^-1
MP,EY,3,MODY1,	! tonne s^-2 mm^-1
MP,EZ,3,MODY1,	! tonne s^-2 mm^-1
MP,PRXY,3,POIXY1,
MP,PRYZ,3,POIXY1,
MP,PRXZ,3,POIXY1,
MP,GXY,3,GSXY1,	! tonne s^-2 mm^-1
MP,GYZ,3,GSYZ1,	! tonne s^-2 mm^-1
MP,GXZ,3,GSXY1,	! tonne s^-2 mm^-1

MP,DENS,4,2e-6,	! tonne mm^-3
MP,EX,4,MODX1,	! tonne s^-2 mm^-1
MP,EY,4,MODY1,	! tonne s^-2 mm^-1
MP,EZ,4,MODY1,	! tonne s^-2 mm^-1
MP,PRXY,4,POIXY1,
MP,PRYZ,4,POIXY1,
MP,PRXZ,4,POIXY1,
MP,GXY,4,GSXY1,	! tonne s^-2 mm^-1
MP,GYZ,4,GSYZ1,	! tonne s^-2 mm^-1
MP,GXZ,4,GSXY1,	! tonne s^-2 mm^-1

MP,DENS,5,2e-6,	! tonne mm^-3
MP,EX,5,MODX1,  ! tonne s^-2 mm^-1
MP,EY,5,MODY1,  ! tonne s^-2 mm^-1
MP,EZ,5,MODY1,  ! tonne s^-2 mm^-1
MP,PRXY,5,POIXY1,
MP,PRYZ,5,POIXY1,
MP,PRXZ,5,POIXY1,
MP,GXY,5,GSXY1, ! tonne s^-2 mm^-1
MP,GYZ,5,GSYZ1, ! tonne s^-2 mm^-1
MP,GXZ,5,GSXY1, ! tonne s^-2 mm^-1

MP,DENS,6,2e-6,	! tonne mm^-3
MP,EX,6,MODX1,  ! tonne s^-2 mm^-1
MP,EY,6,MODY1,  ! tonne s^-2 mm^-1
MP,EZ,6,MODY1,  ! tonne s^-2 mm^-1
MP,PRXY,6,POIXY1,
MP,PRYZ,6,POIXY1,
MP,PRXZ,6,POIXY1,
MP,GXY,6,GSXY1, ! tonne s^-2 mm^-1
MP,GYZ,6,GSYZ1, ! tonne s^-2 mm^-1
MP,GXZ,6,GSXY1, ! tonne s^-2 mm^-1

/com,*********** Send Sheet Properties ***********
sectype,1,shell
secdata,9.5
secoff,bot

sectype,2,shell
secdata,9.5
secoff,mid

sectype,3,shell
secdata,9.5
secoff,top

sectype,4,shell
secdata,9.5
secoff,bot

sectype,5,shell
secdata,9.5
secoff,mid

sectype,6,shell
secdata,9.5
secoff,top

!************************* Model Summary ********************
!Surface,	PGFRP,	matid,	1
!Surface,	PGFRP,	matid,	2
!Surface,	PGFRP,	matid,	3
!Surface1,	PGFRP,	matid,	4
!Surface1,	PGFRP,	matid,	5
!Surface1,	PGFRP,	matid,	6
!************************* End Model Summary ********************
/com,*********** Create Displacement Components For Use In Future MSUP or Multistage Analysis ******
CMBLOCK,_CM104_DISP,NODE,        7
(8i10)
        11        12        14      3885      3886      4415      4416
/com,*********** Create Displacement Components For Use In Future MSUP or Multistage Analysis ******
CMBLOCK,_CM110_DISP,NODE,        7
(8i10)
         9        17        18       415       416       815       816
/com,******* Constant Zero Displacement X *******
CMBLOCK,_DISPZEROUX,NODE,       14
(8i10)
         9        11        12        14        17        18       415       416
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cmsel,s,_DISPZEROUX
d,all,ux,0
nsel,all
/com,******* Constant Zero Displacement Y *******
CMBLOCK,_DISPZEROUY,NODE,       14
(8i10)
         9        11        12        14        17        18       415       416
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cmsel,s,_DISPZEROUY
d,all,uy,0
nsel,all
/com,******* Constant Zero Displacement Z *******
CMBLOCK,_DISPZEROUZ,NODE,       14
(8i10)
         9        11        12        14        17        18       415       416
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cmsel,s,_DISPZEROUZ
d,all,uz,0
nsel,all
/com,********** Rotational Supports Z **********
CMBLOCK,_ROTSUZ ,NODE,       50
(8i10)
         3         4         6         8         9        11        12        14
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cmsel,s,_ROTSUZ
d,all,rotz,0
nsel,all
/com,*********** Define Force Using Surface Effect Elements ***********
local,14,0,0.,0.,0.,0.,0.,0.
csys,0
et,7,156
keyop,7,5,1         !  No orientation node
eblock,10,,,266
(15i9)
     6388        7        7        7       14     2545        4
     6389        7        7        7       14     2544     2545
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-1
esel,s,type,,7
keyop,7,2,1         ! Apply load in local coordinate system
keyop,7,7,1         ! Use original area so load is constant in large deformation
esel,all
fini
/com,****************************************************************************
/com,*************************    SOLUTION       ********************************
/com,****************************************************************************
/solu
antype,0                   ! static analysis
_thickRatio=  0     ! Ratio of thick parts in the model
eqsl,sparse,,,,,1
cntr,print,1               ! print out contact info and also make no initial contact an error
nldiag,cont,iter           ! print out contact info each equilibrium iteration
rescontrol,linear,last           ! Turn on restart files due to future eigen analysis intent
/com,****************************************************
/com,******************* SOLVE FOR LS 1 OF 1 ****************
esel,s,type,,7
nsle
sfe,all,1,pres,1,0.
sfe,all,2,pres,1,-2.5e-004
sfe,all,3,pres,1,0.
nsel,all
esel,all
nsub,1,1,1
time,1.
outres,erase
outres,all,none
outres,nsol,all,
outres,rsol,all
outres,eangl,all
outres,etmp,all
outres,veng,all
outres,strs,all,
outres,epel,all,
outres,eppl,all,
outres,cont,all,
! *********** WB SOLVE COMMAND ***********
solve
/POST1
SET,LAST
PLNSOL, S, EQV

!!!!!!!!!!!!!!!!!!!!!!!!!!!!!!!!
! LINEAR EIGENVALUE BUCKLING
!!!!!!!!!!!!!!!!!!!!!!!!!!!!!!!!
/SOLU
ANTYPE,1
bucopt,lanb,1,,,center
outres,erase
outres,all,none
outres,nsol,all
mxpand
solve

/POST1
SET,1,1
PLNSOL, U, SUM
*GET, UMAXIMO, PLNSOL, 0, MAX
*GET,Fcrit,ACTIVE,0,SET,FREQ
